<Node name="root" dt="0.02" showBehaviorModels="0" showCollisionModels="0" showMappings="0" showForceFields="0" >
	<CollisionPipeline verbose="0" name="CollisionPipeline"/>
	<BruteForceDetection name="N2" />
	<CollisionResponse response="default" name="collision response"/>
	<Node name="Cubes" >
		<EulerImplicit name="cg_odesolver" printLog="false"/>
		<CGLinearSolver iterations="25" name="linear solver" tolerance="1.0e-9" threshold="1.0e-9" />

		<CubeTopology internalPoints="0" splitNormals="1"
			nx="3" ny="3" nz="5"
                        min="-0.015 -0.015 -0.075"
                        max="0.015 0.015 0.075"
			/>
		<MechanicalObject name="dofs" />
		<TriangleFEMForceField name="FEM1" youngModulus="500" poissonRatio="0.3" method="large"/>
		<UniformMass mass="0.1" />
                <FixedConstraint name="FixedConstraint" indices="3 39 64" />

		<Node name="Visu">
			<OglModel name="VisualModel" color="red" />
			<IdentityMapping object1="../.." object2="VisualModel" name="visual mapping"/>
		</Node>
		<Node name="Surf">
      <MechanicalObject />
			<TriangleSet name="CollisionModel" />
			<IdentityMapping name="mapping" input="@.." output="@."/>
		</Node>
	</Node>
</Node>
